*Heading
** Job name: NotchedTensileTest_r15_t2p5_implizit Model name: NotchedTensileTest_r15_t2p5_implizit
** Generated by: Abaqus/CAE 2016
*Preprint, echo=NO, model=NO, history=NO, contact=NO
**
** PARTS
**
*Part, name=Part-1
*Node
      1,   7.55642605,   1.29984403,           0.
      2,   7.55642605,   1.29984403,         0.75
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*Element, type=C3D8R
 1,   58,  317, 1177,  257,    1,   17,  253,   22
 2,  317,   74,  287, 1177,   17,    2,   18,  253
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*Nset, nset=Specimen, generate
    1,  1581,     1
*Elset, elset=Specimen, generate
   1,  960,    1
** Section: Section-1
*Solid Section, elset=Specimen, material=Material-1
,
*End Part
**
**
** ASSEMBLY
**
*Assembly, name=Assembly
**
*Instance, name=Part-1-1, part=Part-1
*End Instance
**
*Elset, elset=ESETSTRAIN, instance=Part-1-1
   8,  10,  12,  14,  16,  18
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*Nset, nset=NSETDISP, instance=Part-1-1
 16,
*Nset, nset=NSETDISPFIELD, instance=Part-1-1
   5,   6,  24,  25,  59,  60
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*Nset, nset=NSETFORCE, instance=Part-1-1
  13,  14,  15,  16, 197, 222
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*Elset, elset=NSETFORCE, instance=Part-1-1, generate
 545,  948,   13
*Nset, nset=XSYM, instance=Part-1-1
   5,   6,   7,   8,  11,  12
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*Elset, elset=XSYM, instance=Part-1-1
  91,  92,  93,  94,  95,  96
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*Nset, nset=YSYM, instance=Part-1-1
   3,   4,   6,   7,  20,  26
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*Elset, elset=YSYM, instance=Part-1-1
  5,  6, 11, 12, 17, 18
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*Nset, nset=ZSYM, instance=Part-1-1
    1,    4,    7,    8,    9,   11
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*Elset, elset=ZSYM, instance=Part-1-1
   1,   3,   5,   7,   9,  11
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*End Assembly
*Amplitude, name=Amp-1
             0.,              0.,              1.,          1.2462
**
** MATERIALS
**
*Material, name=Material-1
*Density
 7.85e-09,
*Elastic
210000., 0.3
*Plastic
*INCLUDE, INPUT=FlowCurve.inp
*Time Points, name=TimePoints-1
0., 0.0169492, 0.0338983, 0.0508475, 0.0677966, 0.0847458, 0.101695, 0.118644
0.135593, 0.152542, 0.169492, 0.186441, 0.20339, 0.220339, 0.237288, 0.254237
0.271186, 0.288136, 0.305085, 0.322034, 0.338983, 0.355932, 0.372881, 0.389831
0.40678, 0.423729, 0.440678, 0.457627, 0.474576, 0.491525, 0.508475, 0.525424
0.542373, 0.559322, 0.576271, 0.59322, 0.610169, 0.627119, 0.644068, 0.661017
0.677966, 0.694915, 0.711864, 0.728814, 0.745763, 0.762712, 0.779661, 0.79661
0.813559, 0.830508, 0.847458, 0.864407, 0.881356, 0.898305, 0.915254, 0.932203
0.949153, 0.966102, 0.983051, 1.
** ----------------------------------------------------------------
**
** STEP: Step-1
**
*Step, name=Step-1, nlgeom=YES
*Static
1., 1., 1e-05, 1.
**
** BOUNDARY CONDITIONS
**
** Name: loading Type: Displacement/Rotation
*Boundary
NSETFORCE, 2, 2, 1.2462
** Name: xsym Type: Symmetry/Antisymmetry/Encastre
*Boundary
XSYM, XSYMM
** Name: ysym Type: Symmetry/Antisymmetry/Encastre
*Boundary
YSYM, YSYMM
** Name: zsym Type: Symmetry/Antisymmetry/Encastre
*Boundary
ZSYM, ZSYMM
**
** OUTPUT REQUESTS
**
*Restart, write, frequency=0
**
** FIELD OUTPUT: F-Output-1
**
*Output, field, variable=PRESELECT, time points=TimePoints-1
*Node Output
A, COORD, RF, U, V
*Element Output, directions=YES
COORD, EVF, LE, PE, PEEQ, PEEQVAVG, PEVAVG, S, SDV, STATUS, SVAVG
** HISTORY OUTPUT: H-Output-1
**
*Output, history, variable=PRESELECT, time points=TimePoints-1
*End Step
