*Heading
** Job name: r5 Model name: NotchedTensileTest_r5_t2p5_implizit
** Generated by: Abaqus/CAE 2016
*Preprint, echo=NO, model=NO, history=NO, contact=NO
**
** PARTS
**
*Part, name=Part-1
*Node
      1,           0.,   4.33012724,           0.
      2,           0.,   4.33012724,         0.75
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*Element, type=C3D8R
  1,  132,  949, 1319,  309,    1,   19,  269,   60
  2,  949,  149,  629, 1319,   19,    2,   20,  269
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*Nset, nset=Set-22, generate
    1,  1782,     1
*Elset, elset=Set-22, generate
    1,  1088,     1
** Section: Section-1
*Solid Section, elset=Set-22, material=Material-1
,
*End Part
**
**
** ASSEMBLY
**
*Assembly, name=Assembly
**
*Instance, name=Part-1, part=Part-1
*End Instance
**
*Elset, elset=ESetStrain, instance=Part-1
  715,  717,  719,  721,  723,  725
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*Nset, nset=NSetDispField, instance=Part-1
   11,   14,  169,  170,  177,  178
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*Nset, nset=NSetForce, instance=Part-1
   3,   4,   7,   8,  40,  81
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*Nset, nset=Set-5, instance=Part-1
   13,   14,   16,   17,  168,  174
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*Elset, elset=Set-5, instance=Part-1
 719, 720, 725, 726, 731, 732
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*Nset, nset=Set-13, instance=Part-1
  11,  12,  13,  14,  15,  16
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*Elset, elset=Set-13, instance=Part-1
 715, 716, 717, 718, 719, 720, 811, 812, 813, 814, 815, 816
*Nset, nset=Set-14, instance=Part-1
    1,    2,    3,    4,    5,    9
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*Elset, elset=Set-14, instance=Part-1
    1,    2,    3,    4,    5,    6
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*Nset, nset=Set-15, instance=Part-1
    1,    2,    3,    4,   11,   12
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*Elset, elset=Set-15, instance=Part-1
   1,   2,   3,   4,   5,   6
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*Nset, nset=Set-16, instance=Part-1
    1,    4,    8,    9,   10,   12
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*Elset, elset=Set-16, instance=Part-1
    1,    3,    5,    7,    9,   11
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*Nset, nset=Set-18, instance=Part-1
    1,    2,    3,    4,   11,   12
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*Elset, elset=Set-18, instance=Part-1
   1,   2,   3,   4,   5,   6
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*Nset, nset=Set-19, instance=Part-1
   13,   14,   16,   17,  168,  174
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*Elset, elset=Set-19, instance=Part-1
 719, 720, 725, 726, 731, 732
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*Nset, nset=Set-20, instance=Part-1
    1,    4,    8,    9,   10,   12
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*Elset, elset=Set-20, instance=Part-1
    1,    3,    5,    7,    9,   11
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*Nset, nset=Set-21, instance=Part-1
   3,   4,   7,   8,  40,  81
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*Elset, elset=Set-21, instance=Part-1
  41,  42,  83,  84, 125, 126
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*End Assembly
*Amplitude, name=Amp-1
             0.,              0.,              1.,          1.2462
**
** MATERIALS
**
*Material, name=Material-1
*Density
 7.85e-09,
*Elastic
210000., 0.3
*Plastic
*INCLUDE, INPUT=FlowCurve.inp
*Time Points, name=TimePoints-1
0., 0.0120482, 0.0240964, 0.0361446, 0.0481928, 0.060241, 0.0722892, 0.0843373
0.0963855, 0.108434, 0.120482, 0.13253, 0.144578, 0.156627, 0.168675, 0.180723
0.192771, 0.204819, 0.216867, 0.228916, 0.240964, 0.253012, 0.26506, 0.277108
0.289157, 0.301205, 0.313253, 0.325301, 0.337349, 0.349398, 0.361446, 0.373494
0.385542, 0.39759, 0.409639, 0.421687, 0.433735, 0.445783, 0.457831, 0.46988
0.481928, 0.493976, 0.506024, 0.518072, 0.53012, 0.542169, 0.554217, 0.566265
0.578313, 0.590361, 0.60241, 0.614458, 0.626506, 0.638554, 0.650602, 0.662651
0.674699, 0.686747, 0.698795, 0.710843, 0.722892, 0.73494, 0.746988, 0.759036
0.771084, 0.783133, 0.795181, 0.807229, 0.819277, 0.831325, 0.843373, 0.855422
0.86747, 0.879518, 0.891566, 0.903614, 0.915663, 0.927711, 0.939759, 0.951807
0.963855, 0.975904, 0.987952, 1.
** ----------------------------------------------------------------
**
** STEP: Step-1
**
*Step, name=Step-1, nlgeom=YES
*Static
1., 1., 1e-05, 1.
**
** BOUNDARY CONDITIONS
**
** Name: loading Type: Displacement/Rotation
*Boundary
Set-21, 2, 2, 1.2462
** Name: xsym Type: Symmetry/Antisymmetry/Encastre
*Boundary
Set-18, XSYMM
** Name: ysym Type: Symmetry/Antisymmetry/Encastre
*Boundary
Set-19, YSYMM
** Name: zsym Type: Symmetry/Antisymmetry/Encastre
*Boundary
Set-20, ZSYMM
**
** OUTPUT REQUESTS
**
*Restart, write, frequency=0
**
** FIELD OUTPUT: F-Output-1
**
*Output, field, time points=TimePoints-1
*Node Output
CF, COORD, RF, U
*Element Output, directions=YES
COORD, LE, PE, PEEQ, PEMAG, S
*Contact Output
CDISP, CSTRESS
**
** HISTORY OUTPUT: H-Output-1
**
*Output, history, variable=PRESELECT
*End Step
